# OpenSim document version 40000
ExternalLoads:
  datafile: C:\Users\Willi\ucloud\PhD\SegmentLength\3DGA\CP10\OSIM\BFND_W7.mot
  lowpass_cutoff_frequency_for_load_kinematics: 6
  ExternalForce [values shared by the 18 below unless stated]: force_expressed_in_body=ground
      point_expressed_in_body=ground
  ExternalForce grf_r_1: applied_to_body=calcn_r force_identifier=ground_force_1_v point_identifier=ground_force_1_p
      torque_identifier=ground_moment_1_m
  ExternalForce grf_r_2: applied_to_body=calcn_r force_identifier=ground_force_2_v point_identifier=ground_force_2_p
      torque_identifier=ground_moment_2_m
  ExternalForce grf_r_3: applied_to_body=calcn_r force_identifier=ground_force_3_v point_identifier=ground_force_3_p
      torque_identifier=ground_moment_3_m
  ExternalForce grf_r_4: applied_to_body=calcn_r force_identifier=ground_force_4_v point_identifier=ground_force_4_p
      torque_identifier=ground_moment_4_m
  ExternalForce grf_r_5: applied_to_body=calcn_r force_identifier=ground_force_5_v point_identifier=ground_force_5_p
      torque_identifier=ground_moment_5_m
  ExternalForce grf_r_6: applied_to_body=calcn_r force_identifier=ground_force_6_v point_identifier=ground_force_6_p
      torque_identifier=ground_moment_6_m
  ExternalForce grf_r_7: applied_to_body=calcn_r force_identifier=ground_force_7_v point_identifier=ground_force_7_p
      torque_identifier=ground_moment_7_m
  ExternalForce grf_r_8: applied_to_body=calcn_r force_identifier=ground_force_8_v point_identifier=ground_force_8_p
      torque_identifier=ground_moment_8_m
  ExternalForce grf_r_9: applied_to_body=calcn_r force_identifier=ground_force_9_v point_identifier=ground_force_9_p
      torque_identifier=ground_moment_9_m
  ExternalForce grf_l_1: applied_to_body=calcn_l force_identifier=ground_force_1_v point_identifier=ground_force_1_p
      torque_identifier=ground_moment_1_m
  ExternalForce grf_l_2: applied_to_body=calcn_l force_identifier=ground_force_2_v point_identifier=ground_force_2_p
      torque_identifier=ground_moment_2_m
  ExternalForce grf_l_3: applied_to_body=calcn_l force_identifier=ground_force_3_v point_identifier=ground_force_3_p
      torque_identifier=ground_moment_3_m
  ExternalForce grf_l_4: applied_to_body=calcn_l force_identifier=ground_force_4_v point_identifier=ground_force_4_p
      torque_identifier=ground_moment_4_m
  ExternalForce grf_l_5: applied_to_body=calcn_l force_identifier=ground_force_5_v point_identifier=ground_force_5_p
      torque_identifier=ground_moment_5_m
  ExternalForce grf_l_6: applied_to_body=calcn_l force_identifier=ground_force_6_v point_identifier=ground_force_6_p
      torque_identifier=ground_moment_6_m
  ExternalForce grf_l_7: applied_to_body=calcn_l force_identifier=ground_force_7_v point_identifier=ground_force_7_p
      torque_identifier=ground_moment_7_m
  ExternalForce grf_l_8: applied_to_body=calcn_l force_identifier=ground_force_8_v point_identifier=ground_force_8_p
      torque_identifier=ground_moment_8_m
  ExternalForce grf_l_9: applied_to_body=calcn_l force_identifier=ground_force_9_v point_identifier=ground_force_9_p
      torque_identifier=ground_moment_9_m
